03/02/2015
15:46
; Script generated by the pharmML2Nmtran Converter v.1.0.0
; Source	: PharmML 0.3.1
; Target	: NMTRAN 7.2.0
; Model 	: Warfarin-ODE-latest
; Dated 	: Tue Feb 03 15:46:30 GMT 2015
$PROBLEM    "Warfarin-ODE-latest - generated by MDL2PharmML v.6.0"
$INPUT      ID TIME WT AMT DVID DV MDV LOGTWT
$DATA      warfarin_conc.csv IGNORE=@
$SUBROUTINE ADVAN13 TOL=9
$MODEL      COMP (GUT) COMP (CENTRAL)
$PK
POP_CL = THETA(1)
POP_V = THETA(2)
POP_KA = THETA(3)
POP_TLAG = THETA(4)
RUV_PROP = THETA(5)
RUV_ADD = THETA(6)
BETA_CL_WT = THETA(7)
BETA_V_WT = THETA(8)

ETA_CL = ETA(1)
ETA_V = ETA(2)
ETA_KA = ETA(3)
ETA_TLAG = ETA(4)

MU_1 = LOG(POP_CL)+BETA_CL_WT * logtWT;
CL = EXP(MU_1 + ETA(1));

MU_2 = LOG(POP_V)+BETA_V_WT * logtWT;
V = EXP(MU_2 + ETA(2));

MU_3 = LOG(POP_KA);
KA = EXP(MU_3 + ETA(3));

MU_4 = LOG(POP_TLAG);
TLAG = EXP(MU_4 + ETA(4));

A_0(1) = 0
A_0(2) = 0

$DES
GUT = A(1)
CENTRAL = A(2)

RATEIN =   0.0;
IF (T.GE.TLAG) THEN
	RATEIN =  (GUT*KA)
ELSE
	RATEIN =  0
ENDIF

CC_DES =  (CENTRAL/V)
DADT(1) = -(RATEIN)
DADT(2) = (RATEIN-((CL*CENTRAL)/V))

$ERROR
CC =  (A(2)/V)

IPRED = CC
W = RUV_ADD+RUV_PROP*IPRED
Y = IPRED+W*EPS(1)
IRES = DV - IPRED
IWRES = IRES/W

$THETA  (0.0010,0.1) ; POP_CL
 (0.0010,8.0) ; POP_V
 (0.0010,0.362) ; POP_KA
 (0.0010,1.0) ; POP_TLAG
 0.1 ; RUV_PROP
 0.1 ; RUV_ADD
 0.75 FIX ; BETA_CL_WT
 1.0 FIX ; BETA_V_WT
$OMEGA  BLOCK(2) STANDARD CORRELATION
 0.1  ;     PPV_CL
 0.01  ; CORR_PPV_CL_V
 0.1  ;      PPV_V
$OMEGA  0.1  STANDARD  ;     PPV_KA
 0.1  STANDARD  ;   PPV_TLAG
$SIGMA  1.0  FIX
$ESTIMATION METHOD=SAEM INTER CTYPE=3 NITER=1000 NBURN=4000 NOPRIOR=1
            CITER=10 CALPHA=0.05 IACCEPT=0.4 ISCALE_MIN=1.0E-06
            ISCALE_MAX=1.0E+06 ISAMPLE_M1=2 ISAMPLE_M1A=0 ISAMPLE_M2=2
            ISAMPLE_M3=2 CONSTRAIN=1 EONLY=0 ISAMPLE=2 PRINT=50
$TABLE      ID TIME WT AMT DVID MDV LOGTWT PRED IPRED RES IRES WRES
            IWRES Y DV NOAPPEND NOPRINT FILE=sdtab
$TABLE      ID CL V KA TLAG ETA_CL ETA_V ETA_KA ETA_TLAG NOAPPEND
            NOPRINT FILE=patab
$TABLE      ID LOGTWT NOAPPEND NOPRINT FILE=cotab

NM-TRAN MESSAGES
 WARNINGS AND ERRORS (IF ANY) FOR PROBLEM    1
 (WARNING  2) NM-TRAN INFERS THAT THE DATA ARE POPULATION.
 (MU_WARNING 26) DATA ITEM(S) USED IN DEFINITION OF MU_(S) SHOULD BE CONSTANT FOR INDIV. REC.:
  LOGTWT

1NONLINEAR MIXED EFFECTS MODEL PROGRAM (NONMEM) VERSION 7.2.0
 ORIGINALLY DEVELOPED BY STUART BEAL, LEWIS SHEINER, AND ALISON BOECKMANN
 CURRENT DEVELOPERS ARE ROBERT BAUER, ICON DEVELOPMENT SOLUTIONS,
 AND ALISON BOECKMANN. IMPLEMENTATION, EFFICIENCY, AND STANDARDIZATION
 PERFORMED BY NOUS INFOSYSTEMS.
 PROBLEM NO.:         1
 "Warfarin-ODE-latest - generated by MDL2PharmML v.6.0"
 TOT. NO. OF OBS RECS:      250
 TOT. NO. OF INDIVIDUALS:     32
 GENERAL NONLINEAR KINETICS MODEL USING LSODA (ADVAN13)
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 #TBLN:      1
 #METH: Stochastic Approximation Expectation-Maximization (No Prior)
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
 #TERM:
 STOCHASTIC PORTION COMPLETED
 REDUCED STOCHASTIC PORTION COMPLETED

 ETABAR IS THE ARITHMETIC MEAN OF THE ETA-ESTIMATES,
 AND THE P-VALUE IS GIVEN FOR THE NULL HYPOTHESIS THAT THE TRUE MEAN IS 0.

 ETABAR:         1.1116E-05  3.3897E-06  3.3673E-06 -3.1544E-06
 SE:             4.5076E-02  2.0706E-02  8.7831E-02  2.5609E-02

 P VAL.:         9.9980E-01  9.9987E-01  9.9997E-01  9.9990E-01

 ETAshrink(%):   1.3927E+00  1.3092E+01  4.9181E+01  5.3072E+01
 EPSshrink(%):   7.6245E+00

 #TERE:
 Elapsed estimation time in seconds:   493.48

 ********************           STOCHASTIC APPROXIMATION EXPECTATION-MAXIMIZATION (NO PRIOR)         ********************
 #OBJT:**************                        FINAL VALUE OF LIKELIHOOD FUNCTION                      ********************
 #OBJV:********************************************     -462.892       **************************************************

 ********************           STOCHASTIC APPROXIMATION EXPECTATION-MAXIMIZATION (NO PRIOR)         ********************
 ********************                             FINAL PARAMETER ESTIMATE                           ********************

 THETA - VECTOR OF FIXED EFFECTS PARAMETERS   *********
         TH 1      TH 2      TH 3      TH 4      TH 5      TH 6      TH 7      TH 8
         1.33E-01  8.15E+00  1.79E+00  8.75E-01  1.06E-01 -1.35E-15  7.50E-01  1.00E+00

 OMEGA - COV MATRIX FOR RANDOM EFFECTS - ETAS  ********
            ETA1      ETA2      ETA3      ETA4
 ETA1
+        6.90E-02
 ETA2
+        8.44E-03  1.88E-02
 ETA3
+        0.00E+00  0.00E+00  9.87E-01
 ETA4
+        0.00E+00  0.00E+00  0.00E+00  9.84E-02

 SIGMA - COV MATRIX FOR RANDOM EFFECTS - EPSILONS  ****
            EPS1
 EPS1
+        1.00E+00

 OMEGA - CORR MATRIX FOR RANDOM EFFECTS - ETAS  *******
            ETA1      ETA2      ETA3      ETA4
 ETA1
+        2.63E-01
 ETA2
+        2.35E-01  1.37E-01
 ETA3
+        0.00E+00  0.00E+00  9.93E-01
 ETA4
+        0.00E+00  0.00E+00  0.00E+00  3.14E-01

 SIGMA - CORR MATRIX FOR RANDOM EFFECTS - EPSILONS  ***
            EPS1
 EPS1
+        1.00E+00
